# Распространение электромагнитной волны в прямоугольном водноводе
# расчётный материа
# Дано:
# Константы | Исходные данные
C := 2.9979*10^8  # скосроть света
F := 40*10^9  # частота
E0 := 8.854*10^-12  # электрическая постоянная
time := 0
U0 := 1.257*10^-6  # магнитная постоянная
a := 20*10^-3  # ширина  # моды
m := 1
n := 0
b := 20*10^-3  # высота
# Диэлектрическая проницаеамость среды
E := 1
U := 1
Ea := E*E0 = 8.854e-12
Ua := U0*U = 1.257e-6
T := 1/F = 2.5e-11  # периуд колебанний (c)
W := 2*π*F = 2.51327e11  # циклическая частота (рад/с)
L := C/F = 0.00749475  # длина волны (м)
K := 2*π/L = 838.345  # волновое число
Kx := m*π/a = 157.08
Ky := n*π/b = 0  # составляющие волнового числа
Ks := sqrt(Kx^2 + Ky^2) = 157.08  # поперечная составляющая волнового числа
Lkr := 2*π/Ks = 0.04  # критическая длина волны  (м)
Kapr := sqrt(1 - (L/Lkr)^2) = 0.98229  # аппертура волновода
B := K*Kapr = 823.497  # фазовая постоянная
Lv := L/Kapr = 0.00762988  # длина волны в водноводе (м)
Fv := C/Lv = 3.92916e10  # частота в волноводе (Гц)
Vf := C/Kapr = 305195113  # фазовая скорость (м/с)
Vgr := C*Kapr = 294480613  # груповая скорость (м/с)
Fkr := C/Lkr = 7494750000  # критическая частота (Гц)
# Волновое сопротивление среды заполняющей, волновод (Ом)
Z_0 := sqrt(Ua/Ea) = 376.789
Z_TE := Z_0/Kapr = 383.582  # Волновое сопротивление H волны (Ом)
Z_TM := Z_0*Kapr = 370.116  # Волновое сопротивление E волны (Ом)
# Функции для расчёта составляющих и проекций
# Составляющие электромагнитных волн тип H
TE_Hx(x, y, z) := Kx*B*sin(Kx*x)*cos(Ky*y)/Ks^2*sin(W*time - B*z + π/2)
TE_Hy(x, y, z) := Ky*B*cos(Kx*x)*sin(Ky*y)/Ks^2*sin(W*time - B*z + π/2)
TE_Hz(x, y, z) := cos(Kx*x)*cos(Ky*y)*cos(W*time - B*z)
TE_Ex(x, y, z) := Ky*Z_TE*B*cos(Kx*x)*sin(Ky*y)/Ks^2*sin(W*time - B*z + π/2)
TE_Ey(x, y, z) := Kx*Z_TE*B*sin(Kx*x)*cos(Ky*y)/Ks^2*sin(W*time - B*z)
# Для_проекции_XY | Для_проекции_YZ | Для_проекции_XZ
Zmax := Lv/1
Xmax := a/2 = 0.01
Ymax := a/2 = 0.01
# Функции для построения проекция на стенки волновода
TEh_xy(x, y) := sqrt(TE_Hx(x, y, Zmax)^2 + TE_Hy(x, y, Zmax)^2 + TE_Hz(x, y, Zmax)^2)
TEh_xz(x, y) := sqrt(TE_Hx(x, Ymax, y)^2 + TE_Hz(x, Ymax, y)^2 + TE_Hy(x, Ymax, y)^2)
TEh_yz(x, y) := sqrt(TE_Hy(Xmax, y, x)^2 + TE_Hz(Xmax, y, x)^2 + TE_Hx(Xmax, y, x)^2)
TEe_xy(x, y) := sqrt(TE_Ex(x, y, Zmax)^2 + TE_Ey(x, y, Zmax)^2)
TEe_xz(z, x) := sqrt(TE_Ex(x, Ymax, z)^2 + TE_Ey(x, Ymax, z)^2)
TEe_yz(z, y) := sqrt(TE_Ex(Xmax, y, z)^2 + TE_Ey(Xmax, y, z)^2)
# Составляющие электромагнитных волн тип E
TM_Hx(x, y, z) := Ky*B*sin(Kx*x)*cos(Ky*y)/(Ks^2*Z_TM)*sin(W*time - B*z)
TM_Hy(x, y, z) := Kx*B*cos(Kx*x)*sin(Ky*y)/(Ks^2*Z_TM)*sin(W*time - B*z + π/2)
TM_Ex(x, y, z) := Kx*B*cos(Kx*x)*sin(Ky*y)/Ks^2*sin(W*time - B*z)
TM_Ey(x, y, z) := Ky*B*sin(Kx*x)*cos(Ky*y)/Ks^2*sin(W*time - B*z)
TM_Ez(x, y, z) := sin(Kx*x)*sin(Ky*y)*cos(W*time - B*z)
# Для_проекции_XY | Для_проекции_YZ | Для_проекции_XZ
Zmax := Lv/1
Xmax := a/4 = 0.005
Ymax := b/4 = 0.005
# Функции для построения проекция на стенки волновода
TMh_xy(x, y) := sqrt(TM_Hx(x, y, Zmax)^2 + TM_Hy(x, y, Zmax)^2)
TMh_xz(x, z) := sqrt(TM_Hx(x, Ymax, z)^2 + TM_Hy(x, Ymax, z)^2)
TMh_yz(y, z) := sqrt(TM_Hy(Xmax, y, z)^2 + TM_Hx(Xmax, y, z)^2)
TMe_xy(x, y) := sqrt(TM_Ex(x, y, Zmax)^2 + TM_Ey(x, y, Zmax)^2 + TM_Ez(x, y, Zmax)^2)
TMe_xz(x, z) := sqrt(TM_Ex(x, Ymax, z)^2 + TM_Ey(x, Ymax, z)^2 + TM_Ez(x, Ymax, z)^2)
TMe_yz(y, z) := sqrt(TM_Ex(Xmax, y, z)^2 + TM_Ey(Xmax, y, z)^2 + TM_Ez(Xmax, y, z)^2)
