min := 0
max := 100
X := transpose([min, max*0.0625, max*0.125, max*0.1875, max*0.25, max*0.3125, max*0.375, max*0.4375, max*0.5, max*0.5625, max*0.625, max*0.6875, max*0.75, max*0.8125, max*0.875, max*0.9375, max])
R := transpose([0, 0, 0, 0, 0, 0, 0, 0, 0, 75, 150, 220, 255, 255, 255, 255, 255])
rows(R) = 17
G := transpose([30, 75, 100, 145, 200, 255, 255, 255, 255, 255, 255, 255, 200, 145, 100, 75, 30])
rows(G) = 17
x := 0, 0.5 .. max
B := transpose([255, 255, 255, 255, 255, 220, 145, 75, 0, 0, 0, 0, 0, 0, 0, 0, 0])
rows(B) = 17
rows(X) = 17
VsR := cspline(X, R)
VsG := cspline(X, G)
VsB := cspline(X, B)
LR(x) := interp(VsR, X, R, x)
LG(x) := interp(VsG, X, G, x)
LB(x) := interp(VsB, X, B, x)
# [plot: R, B, G, LR(x), LG(x), LB(x) vs X, x]
